*Heading
** Job name: Job-LAM-10 Model name: Model-LAM-2
** Generated by: Abaqus/CAE 2022
*Preprint, echo=NO, model=NO, history=NO, contact=NO
**
** PARTS
**
*Part, name=Part-1
*Node
      1,           0.,         -15.,          2.5
      2,           0.,         -14.,          2.5
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*Element, type=C3D8T
   1,  125,  126,  157,  156,    1,    2,   33,   32
   2,  126,  127,  158,  157,    2,    3,   34,   33
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*Nset, nset=_PickedSet8, internal, generate
    1,  6324,     1
*Elset, elset=_PickedSet8, internal, generate
    1,  4500,     1
** Section: Section-WP
*Solid Section, elset=_PickedSet8, material=nieji
,
*End Part
**
*Part, name=from_new_cutter
*Node
      1,   2.70957303,          1.5,   -2.0493443
      2,   4.95422745,    1.5064286,  -3.73255587
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*Element, type=C3D4T
    1, 1885, 1886, 1887, 1888
    2, 1889, 1890, 1891, 1887
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*Nset, nset=_PickedSet5, internal, generate
    1,  6867,     1
*Elset, elset=_PickedSet5, internal, generate
     1,  35582,      1
** Section: Section-Tool
*Solid Section, elset=_PickedSet5, material=xidao
,
*End Part
**
**
** ASSEMBLY
**
*Assembly, name=Assembly
**
*Instance, name=Part-1-1, part=Part-1
          0.,           0.,           0.
          0.,           0.,           0., -1.00000001268805,           0., 6.12323420726539e-17, 89.9999992730282
*End Instance
**
*Instance, name=from_new_cutter-1, part=from_new_cutter
       -11.5,         2.24,           0.
*End Instance
**
*Node
      1,        -11.5,    2.2398808, 1.13305854e-09
*Nset, nset=Node-nieji, instance=Part-1-1, generate
    1,  6324,     1
*Nset, nset=Set-4, instance=Part-1-1
   94,   95,   96,   97,   98,   99
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*Elset, elset=Set-4, instance=Part-1-1
   61,   62,   63,   64,   65,   66
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*Nset, nset=_PickedSet19, internal, instance=Part-1-1, generate
    1,  6324,     1
*Elset, elset=_PickedSet19, internal, instance=Part-1-1, generate
    1,  4500,     1
*Nset, nset=_PickedSet37, internal
 1,
*Nset, nset=_PickedSet38, internal
 1,
*Nset, nset=_PickedSet39, internal
 1,
*Nset, nset=_PickedSet40, internal, instance=from_new_cutter-1, generate
    1,  6867,     1
*Elset, elset=_PickedSet40, internal, instance=from_new_cutter-1, generate
     1,  35582,      1
*Elset, elset=_Surf-5_S1, internal, instance=from_new_cutter-1
  2041,  2577,  2691,  2738,  2857,  2867
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*Elset, elset=_Surf-5_S2, internal, instance=from_new_cutter-1
   175,   302,   516,   727,  1732,  2272
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*Elset, elset=_Surf-5_S3, internal, instance=from_new_cutter-1
    15,    45,   141,   172,   217,   278
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*Elset, elset=_Surf-5_S4, internal, instance=from_new_cutter-1
   289,   307,   318,   417,   508,   537
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*Surface, type=ELEMENT, name=Surf-5
_Surf-5_S1, S1
_Surf-5_S2, S2
_Surf-5_S4, S4
_Surf-5_S3, S3
*Elset, elset=_Surf-heat_S3, internal, instance=Part-1-1
    1,    2,    3,    4,    5,    6
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*Surface, type=ELEMENT, name=Surf-heat
_Surf-heat_S3, S3
*Elset, elset=_Surf-nieji_S1, internal, instance=Part-1-1, generate
 4411,  4500,     1
*Elset, elset=_Surf-nieji_S2, internal, instance=Part-1-1, generate
  1,  90,   1
*Elset, elset=_Surf-nieji_S3, internal, instance=Part-1-1
    1,    2,    3,    4,    5,    6
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*Elset, elset=_Surf-nieji_S4, internal, instance=Part-1-1, generate
   30,  4500,    30
*Elset, elset=_Surf-nieji_S5, internal, instance=Part-1-1
   61,   62,   63,   64,   65,   66
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*Elset, elset=_Surf-nieji_S6, internal, instance=Part-1-1, generate
    1,  4471,    30
*Surface, type=ELEMENT, name=Surf-nieji
_Surf-nieji_S1, S1
_Surf-nieji_S2, S2
_Surf-nieji_S4, S4
_Surf-nieji_S6, S6
_Surf-nieji_S3, S3
_Surf-nieji_S5, S5
** Constraint: Constraint-2
*Rigid Body, ref node=_PickedSet39, elset=_PickedSet40
*End Assembly
**
** MATERIALS
**
*Material, name=nieji
*Conductivity
 13.5,  20.
 14.7, 100.
 15.9, 200.
 17.6, 300.
 18.8, 400.
 20.1, 500.
 21.8, 600.
  23., 700.
 24.3, 800.
  26., 900.
 27.6,1000.
*Damage Initiation, criterion=JOHNSON COOK
 -0.239, 0.456,  -0.3,    0.,   2.5, 1400.,   20.,    1.
*Damage Evolution, type=DISPLACEMENT
 0.1,
*Density
 8.24e-09,
*Elastic
204000.,  0.3,  20.
204000.,  0.3, 100.
204000.,  0.3, 200.
181000.,  0.3, 300.
176000., 0.31, 400.
176000., 0.31, 450.
160000., 0.32, 500.
160000., 0.32, 550.
150000., 0.32, 600.
146000., 0.32, 650.
141000., 0.33, 700.
*Expansion
 1.32e-05, 20.
 1.33e-05,100.
 1.38e-05,200.
  1.4e-05,300.
 1.46e-05,400.
  1.5e-05,500.
 1.58e-05,600.
  1.7e-05,700.
 1.84e-05,800.
 1.87e-05,900.
*Inelastic Heat Fraction
         0.9,
*Plastic, hardening=JOHNSON COOK
985., 949.,  0.4,  1.3,1400.,  20.
*Rate Dependent, type=JOHNSON COOK
 0.0312,1.
*Specific Heat
 4.074e+08,100.
 4.814e+08,300.
 4.939e+08,400.
 5.148e+08,500.
  5.39e+08,600.
 5.734e+08,700.
 6.154e+08,800.
 6.572e+08,900.
*Material, name=xidao
*Conductivity
 79.6,
*Density
 1.485e-08,
*Elastic
640000., 0.22
*Expansion
 4.7e-06,
*Specific Heat
 2.03e+08,
**
** INTERACTION PROPERTIES
**
*Surface Interaction, name=IntProp-1
*Friction
 0.2,
*Surface Behavior, pressure-overclosure=HARD
**
** BOUNDARY CONDITIONS
**
** Name: BC-1 Type: Symmetry/Antisymmetry/Encastre
*Boundary
Set-4, ENCASTRE
**
** PREDEFINED FIELDS
**
** Name: Predefined Field-1   Type: Temperature
*Initial Conditions, type=TEMPERATURE
_PickedSet19, 20.
** ----------------------------------------------------------------
**
** STEP: Mill
**
*Step, name=Mill, nlgeom=YES
*Dynamic Temperature-displacement, Explicit
, 0.03
*Bulk Viscosity
0.06, 1.2
** Mass Scaling: Semi-Automatic
**               Whole Model
*Fixed Mass Scaling, dt=1e-06, type=below min
**
** BOUNDARY CONDITIONS
**
** Name: BC-2 Type: Velocity/Angular velocity
*Boundary, type=VELOCITY
_PickedSet37, 1, 1, 500.
_PickedSet37, 2, 2
_PickedSet37, 3, 3
_PickedSet37, 4, 4
_PickedSet37, 6, 6
** Name: BC-3 Type: Velocity/Angular velocity
*Boundary, type=VELOCITY
_PickedSet38, 2, 2
_PickedSet38, 3, 3
_PickedSet38, 4, 4
_PickedSet38, 5, 5, -500.
_PickedSet38, 6, 6
**
** LOADS
**
** Name: Load-1   Type: Surface heat flux
*Dsflux
Surf-heat, SNU, 0.
**
** INTERACTIONS
**
** Interaction: Int-1
*Contact, op=NEW
*Contact Inclusions
Surf-5 , Surf-nieji
Surf-nieji ,
*Contact Property Assignment
 ,  , IntProp-1
**
** OUTPUT REQUESTS
**
*Restart, write, number interval=1, time marks=NO
**
** FIELD OUTPUT: F-Output-1
**
*Output, field, number interval=100
*Node Output
U,
*Element Output, directions=YES
E, LE, MISES, PE, PEEQ, PEEQVAVG, S, STATUS, TEMP
**
** HISTORY OUTPUT: H-Output-1
**
*Output, history, variable=PRESELECT
*End Step
